*Heading
** Job name: X5_0319 Model name: Model-1
** Generated by: Abaqus/CAE 2020
*Preprint, echo=NO, model=NO, history=NO, contact=NO
**
** PARTS
**
*Part, name=P168m-3blade-V3-hover
*Node
      1,  -40.6732826,   190.920883,  -3.09678435
      2,           0.,   190.920883,  -20.6154232
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*Element, type=S4R
 1, 675, 679,  70,  69
 2, 679, 680,  71,  70
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*Element, type=S3
79, 720, 721, 716
1780, 2134, 2135, 2131
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*Node
   3571,           0.,           0.,           0.
*Nset, nset=P168m-3blade-V3-hover-RefPt_, internal
3571,
*Nset, nset=skin
    1,    2,    3,    4,    5,    6
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*Elset, elset=skin
    1,    2,    3,    4,    5,    6
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*Nset, nset=lei1
    2,    3,   13,   20,   26,   42
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*Elset, elset=lei1, generate
 3239,  3385,     1
*Nset, nset=lei2
    1,    4,   12,   19,   25,   44
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*Elset, elset=lei2, generate
 3124,  3238,     1
*Nset, nset=Z1
    1,    2,    3,    4,    5,    6
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*Elset, elset=Z1
    1,    2,    3,    4,    5,    6
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*Nset, nset=Z2
    1,    2,    3,    4,    5,    6
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*Elset, elset=Z2
    1,    2,    3,    4,    5,    6
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*Nset, nset=Z3
    1,    2,    3,    4,    5,    6
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*Elset, elset=Z3
    1,    2,    3,    4,    5,    6
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** Region: (CompositeLayup-3-5: Generated From Layup)
*Elset, elset=CompositeLayup-3-5
    1,    2,    3,    4,    5,    6
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** Section: CompositeLayup-3-5
*Orientation, name=Ori-CompositeLayup-3-5-L1
          0.,           1.,           0.,           1.,           0.,           0.
3, 0.
*Orientation, name=Ori-CompositeLayup-3-5-L2
          0.,           1.,           0.,           1.,           0.,           0.
3, 45.
*Orientation, name=Ori-CompositeLayup-3-5-L3
          0.,           1.,           0.,           1.,           0.,           0.
3, 90.
*Orientation, name=Ori-CompositeLayup-3-5-L4
          0.,           1.,           0.,           1.,           0.,           0.
3, 0.
*Orientation, name=Ori-CompositeLayup-3-5-L5
          0.,           1.,           0.,           1.,           0.,           0.
3, 0.
*Orientation, name=Ori-CompositeLayup-3-5-L6
          0.,           1.,           0.,           1.,           0.,           0.
3, 90.
*Orientation, name=Ori-CompositeLayup-3-5-L7
          0.,           1.,           0.,           1.,           0.,           0.
3, -45.
*Orientation, name=Ori-CompositeLayup-3-5-L8
          0.,           1.,           0.,           1.,           0.,           0.
3, 0.
*Orientation, name=Ori-CompositeLayup-3-5-L9
          0.,           1.,           0.,           1.,           0.,           0.
3, 45.
*Orientation, name=Ori-CompositeLayup-3-5-L10
          0.,           1.,           0.,           1.,           0.,           0.
3, 0.
*Orientation, name=Ori-CompositeLayup-3-5-L11
          0.,           1.,           0.,           1.,           0.,           0.
3, 0.
*Orientation, name=Ori-CompositeLayup-3-5-L12
          0.,           1.,           0.,           1.,           0.,           0.
3, 0.
*Orientation, name=Ori-CompositeLayup-3-5-L13
          0.,           1.,           0.,           1.,           0.,           0.
3, -45.
*Shell Section, elset=CompositeLayup-3-5, composite, offset=SNEG, layup=CompositeLayup-3
0.2, 3, T300_tex, Ori-CompositeLayup-3-5-L1, P1
0.15, 3, T700_danxiang, Ori-CompositeLayup-3-5-L2, P2
0.15, 3, T700_danxiang, Ori-CompositeLayup-3-5-L3, P3
0.15, 3, T700_danxiang, Ori-CompositeLayup-3-5-L4, P4
0.15, 3, T700_danxiang, Ori-CompositeLayup-3-5-L5, P5
0.15, 3, T700_danxiang, Ori-CompositeLayup-3-5-L6, P6
0.15, 3, T700_danxiang, Ori-CompositeLayup-3-5-L7, P7
0.2, 3, T300_tex, Ori-CompositeLayup-3-5-L8, P8
0.15, 3, T700_danxiang, Ori-CompositeLayup-3-5-L9, P14
0.15, 3, T700_danxiang, Ori-CompositeLayup-3-5-L10, P15
0.15, 3, T700_danxiang, Ori-CompositeLayup-3-5-L11, P16
0.15, 3, T700_danxiang, Ori-CompositeLayup-3-5-L12, P17
0.15, 3, T700_danxiang, Ori-CompositeLayup-3-5-L13, P18
** Region: (CompositeLayup-3-4: Generated From Layup)
*Elset, elset=CompositeLayup-3-4
   36,   37,   38,   39,   40,   41
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** Section: CompositeLayup-3-4
*Orientation, name=Ori-CompositeLayup-3-4-L1
          0.,           1.,           0.,           1.,           0.,           0.
3, 0.
*Orientation, name=Ori-CompositeLayup-3-4-L2
          0.,           1.,           0.,           1.,           0.,           0.
3, 45.
*Orientation, name=Ori-CompositeLayup-3-4-L3
          0.,           1.,           0.,           1.,           0.,           0.
3, 90.
*Orientation, name=Ori-CompositeLayup-3-4-L4
          0.,           1.,           0.,           1.,           0.,           0.
3, 0.
*Orientation, name=Ori-CompositeLayup-3-4-L5
          0.,           1.,           0.,           1.,           0.,           0.
3, 0.
*Orientation, name=Ori-CompositeLayup-3-4-L6
          0.,           1.,           0.,           1.,           0.,           0.
3, 90.
*Orientation, name=Ori-CompositeLayup-3-4-L7
          0.,           1.,           0.,           1.,           0.,           0.
3, -45.
*Orientation, name=Ori-CompositeLayup-3-4-L8
          0.,           1.,           0.,           1.,           0.,           0.
3, 0.
*Orientation, name=Ori-CompositeLayup-3-4-L9
          0.,           1.,           0.,           1.,           0.,           0.
3, 45.
*Orientation, name=Ori-CompositeLayup-3-4-L10
          0.,           1.,           0.,           1.,           0.,           0.
3, 0.
*Orientation, name=Ori-CompositeLayup-3-4-L11
          0.,           1.,           0.,           1.,           0.,           0.
3, 0.
*Orientation, name=Ori-CompositeLayup-3-4-L12
          0.,           1.,           0.,           1.,           0.,           0.
3, 0.
*Orientation, name=Ori-CompositeLayup-3-4-L13
          0.,           1.,           0.,           1.,           0.,           0.
3, -45.
*Shell Section, elset=CompositeLayup-3-4, composite, offset=SNEG, layup=CompositeLayup-3
0.2, 3, T300_tex, Ori-CompositeLayup-3-4-L1, P1
0.15, 3, T700_danxiang, Ori-CompositeLayup-3-4-L2, P2
0.15, 3, T700_danxiang, Ori-CompositeLayup-3-4-L3, P3
0.15, 3, T700_danxiang, Ori-CompositeLayup-3-4-L4, P4
0.15, 3, T700_danxiang, Ori-CompositeLayup-3-4-L5, P5
0.15, 3, T700_danxiang, Ori-CompositeLayup-3-4-L6, P6
0.15, 3, T700_danxiang, Ori-CompositeLayup-3-4-L7, P7
0.2, 3, T300_tex, Ori-CompositeLayup-3-4-L8, P8
0.15, 3, T700_danxiang, Ori-CompositeLayup-3-4-L9, P9
0.15, 3, T700_danxiang, Ori-CompositeLayup-3-4-L10, P10
0.15, 3, T700_danxiang, Ori-CompositeLayup-3-4-L11, P11
0.15, 3, T700_danxiang, Ori-CompositeLayup-3-4-L12, P12
0.15, 3, T700_danxiang, Ori-CompositeLayup-3-4-L13, P13
** Region: (CompositeLayup-3-2: Generated From Layup)
*Elset, elset=CompositeLayup-3-2
   80,   81,   82,   83,   84,   85
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** Section: CompositeLayup-3-2
*Orientation, name=Ori-CompositeLayup-3-2-L1
          0.,           1.,           0.,           1.,           0.,           0.
3, 0.
*Orientation, name=Ori-CompositeLayup-3-2-L2
          0.,           1.,           0.,           1.,           0.,           0.
3, 45.
*Orientation, name=Ori-CompositeLayup-3-2-L3
          0.,           1.,           0.,           1.,           0.,           0.
3, 90.
*Orientation, name=Ori-CompositeLayup-3-2-L4
          0.,           1.,           0.,           1.,           0.,           0.
3, 0.
*Orientation, name=Ori-CompositeLayup-3-2-L5
          0.,           1.,           0.,           1.,           0.,           0.
3, 0.
*Orientation, name=Ori-CompositeLayup-3-2-L6
          0.,           1.,           0.,           1.,           0.,           0.
3, 90.
*Orientation, name=Ori-CompositeLayup-3-2-L7
          0.,           1.,           0.,           1.,           0.,           0.
3, -45.
*Orientation, name=Ori-CompositeLayup-3-2-L8
          0.,           1.,           0.,           1.,           0.,           0.
3, 0.
*Orientation, name=Ori-CompositeLayup-3-2-L9
          0.,           1.,           0.,           1.,           0.,           0.
3, 45.
*Orientation, name=Ori-CompositeLayup-3-2-L10
          0.,           1.,           0.,           1.,           0.,           0.
3, 0.
*Orientation, name=Ori-CompositeLayup-3-2-L11
          0.,           1.,           0.,           1.,           0.,           0.
3, 0.
*Orientation, name=Ori-CompositeLayup-3-2-L12
          0.,           1.,           0.,           1.,           0.,           0.
3, 0.
*Orientation, name=Ori-CompositeLayup-3-2-L13
          0.,           1.,           0.,           1.,           0.,           0.
3, -45.
*Shell Section, elset=CompositeLayup-3-2, composite, offset=SNEG, layup=CompositeLayup-3
0.2, 3, T300_tex, Ori-CompositeLayup-3-2-L1, P1
0.15, 3, T700_danxiang, Ori-CompositeLayup-3-2-L2, P2
0.15, 3, T700_danxiang, Ori-CompositeLayup-3-2-L3, P3
0.15, 3, T700_danxiang, Ori-CompositeLayup-3-2-L4, P4
0.15, 3, T700_danxiang, Ori-CompositeLayup-3-2-L5, P5
0.15, 3, T700_danxiang, Ori-CompositeLayup-3-2-L6, P6
0.15, 3, T700_danxiang, Ori-CompositeLayup-3-2-L7, P7
0.2, 3, T300_tex, Ori-CompositeLayup-3-2-L8, P8
0.15, 3, T700_danxiang, Ori-CompositeLayup-3-2-L9, P19
0.15, 3, T700_danxiang, Ori-CompositeLayup-3-2-L10, P20
0.15, 3, T700_danxiang, Ori-CompositeLayup-3-2-L11, P21
0.15, 3, T700_danxiang, Ori-CompositeLayup-3-2-L12, P22
0.15, 3, T700_danxiang, Ori-CompositeLayup-3-2-L13, P23
** Region: (CompositeLayup-3-3: Generated From Layup)
*Elset, elset=CompositeLayup-3-3
 1380, 1381, 1382, 1383, 1384, 1385
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** Section: CompositeLayup-3-3
*Orientation, name=Ori-CompositeLayup-3-3-L1
          0.,           1.,           0.,           1.,           0.,           0.
3, 0.
*Orientation, name=Ori-CompositeLayup-3-3-L2
          0.,           1.,           0.,           1.,           0.,           0.
3, 45.
*Orientation, name=Ori-CompositeLayup-3-3-L3
          0.,           1.,           0.,           1.,           0.,           0.
3, 90.
*Orientation, name=Ori-CompositeLayup-3-3-L4
          0.,           1.,           0.,           1.,           0.,           0.
3, 0.
*Orientation, name=Ori-CompositeLayup-3-3-L5
          0.,           1.,           0.,           1.,           0.,           0.
3, 0.
*Orientation, name=Ori-CompositeLayup-3-3-L6
          0.,           1.,           0.,           1.,           0.,           0.
3, 90.
*Orientation, name=Ori-CompositeLayup-3-3-L7
          0.,           1.,           0.,           1.,           0.,           0.
3, -45.
*Orientation, name=Ori-CompositeLayup-3-3-L8
          0.,           1.,           0.,           1.,           0.,           0.
3, 0.
*Orientation, name=Ori-CompositeLayup-3-3-L9
          0.,           1.,           0.,           1.,           0.,           0.
3, 0.
*Orientation, name=Ori-CompositeLayup-3-3-L10
          0.,           1.,           0.,           1.,           0.,           0.
3, 0.
*Shell Section, elset=CompositeLayup-3-3, composite, offset=SNEG, layup=CompositeLayup-3
0.2, 3, T300_tex, Ori-CompositeLayup-3-3-L1, P1
0.15, 3, T700_danxiang, Ori-CompositeLayup-3-3-L2, P2
0.15, 3, T700_danxiang, Ori-CompositeLayup-3-3-L3, P3
0.15, 3, T700_danxiang, Ori-CompositeLayup-3-3-L4, P4
0.15, 3, T700_danxiang, Ori-CompositeLayup-3-3-L5, P5
0.15, 3, T700_danxiang, Ori-CompositeLayup-3-3-L6, P6
0.15, 3, T700_danxiang, Ori-CompositeLayup-3-3-L7, P7
0.2, 3, T300_tex, Ori-CompositeLayup-3-3-L8, P8
0.2, 3, T300_tex, Ori-CompositeLayup-3-3-L9, P24
0.2, 3, T300_tex, Ori-CompositeLayup-3-3-L10, P25
** Region: (CompositeLayup-3-1: Generated From Layup)
*Elset, elset=CompositeLayup-3-1
 2932, 2933, 2934, 2935, 2936, 2937
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** Section: CompositeLayup-3-1
*Orientation, name=Ori-CompositeLayup-3-1-L1
          0.,           1.,           0.,           1.,           0.,           0.
3, 0.
*Orientation, name=Ori-CompositeLayup-3-1-L2
          0.,           1.,           0.,           1.,           0.,           0.
3, 45.
*Orientation, name=Ori-CompositeLayup-3-1-L3
          0.,           1.,           0.,           1.,           0.,           0.
3, 90.
*Orientation, name=Ori-CompositeLayup-3-1-L4
          0.,           1.,           0.,           1.,           0.,           0.
3, 0.
*Orientation, name=Ori-CompositeLayup-3-1-L5
          0.,           1.,           0.,           1.,           0.,           0.
3, 0.
*Orientation, name=Ori-CompositeLayup-3-1-L6
          0.,           1.,           0.,           1.,           0.,           0.
3, 90.
*Orientation, name=Ori-CompositeLayup-3-1-L7
          0.,           1.,           0.,           1.,           0.,           0.
3, -45.
*Orientation, name=Ori-CompositeLayup-3-1-L8
          0.,           1.,           0.,           1.,           0.,           0.
3, 0.
*Shell Section, elset=CompositeLayup-3-1, composite, offset=SNEG, layup=CompositeLayup-3
0.2, 3, T300_tex, Ori-CompositeLayup-3-1-L1, P1
0.15, 3, T700_danxiang, Ori-CompositeLayup-3-1-L2, P2
0.15, 3, T700_danxiang, Ori-CompositeLayup-3-1-L3, P3
0.15, 3, T700_danxiang, Ori-CompositeLayup-3-1-L4, P4
0.15, 3, T700_danxiang, Ori-CompositeLayup-3-1-L5, P5
0.15, 3, T700_danxiang, Ori-CompositeLayup-3-1-L6, P6
0.15, 3, T700_danxiang, Ori-CompositeLayup-3-1-L7, P7
0.2, 3, T300_tex, Ori-CompositeLayup-3-1-L8, P8
** Region: (CompositeLayup-2-1: Generated From Layup)
*Elset, elset=CompositeLayup-2-1, generate
 3124,  3238,     1
** Section: CompositeLayup-2-1
*Orientation, name=Ori-CompositeLayup-2-1-L1
          0.,           1.,           0.,           0.,           0.,           1.
3, 45.
*Orientation, name=Ori-CompositeLayup-2-1-L2
          0.,           1.,           0.,           0.,           0.,           1.
3, 0.
*Orientation, name=Ori-CompositeLayup-2-1-L3
          0.,           1.,           0.,           0.,           0.,           1.
3, 0.
*Orientation, name=Ori-CompositeLayup-2-1-L4
          0.,           1.,           0.,           0.,           0.,           1.
3, -45.
*Orientation, name=Ori-CompositeLayup-2-1-L5
          0.,           1.,           0.,           0.,           0.,           1.
3, 0.
*Orientation, name=Ori-CompositeLayup-2-1-L6
          0.,           1.,           0.,           0.,           0.,           1.
3, 0.
*Orientation, name=Ori-CompositeLayup-2-1-L7
          0.,           1.,           0.,           0.,           0.,           1.
3, -45.
*Orientation, name=Ori-CompositeLayup-2-1-L8
          0.,           1.,           0.,           0.,           0.,           1.
3, 0.
*Orientation, name=Ori-CompositeLayup-2-1-L9
          0.,           1.,           0.,           0.,           0.,           1.
3, 0.
*Orientation, name=Ori-CompositeLayup-2-1-L10
          0.,           1.,           0.,           0.,           0.,           1.
3, 45.
*Shell Section, elset=CompositeLayup-2-1, composite, layup=CompositeLayup-2
0.15, 3, T700_danxiang, Ori-CompositeLayup-2-1-L1, Ply-1
0.15, 3, T700_danxiang, Ori-CompositeLayup-2-1-L2, Ply-2
0.15, 3, T700_danxiang, Ori-CompositeLayup-2-1-L3, Ply-3
0.15, 3, T700_danxiang, Ori-CompositeLayup-2-1-L4, Ply-4
0.15, 3, T700_danxiang, Ori-CompositeLayup-2-1-L5, Ply-5
0.15, 3, T700_danxiang, Ori-CompositeLayup-2-1-L6, Ply-6
0.15, 3, T700_danxiang, Ori-CompositeLayup-2-1-L7, Ply-7
0.15, 3, T700_danxiang, Ori-CompositeLayup-2-1-L8, Ply-8
0.15, 3, T700_danxiang, Ori-CompositeLayup-2-1-L9, Ply-9
0.15, 3, T700_danxiang, Ori-CompositeLayup-2-1-L10, Ply-10
** Region: (CompositeLayup-1-1: Generated From Layup)
*Elset, elset=CompositeLayup-1-1, generate
 3239,  3385,     1
** Section: CompositeLayup-1-1
*Orientation, name=Ori-CompositeLayup-1-1-L1
          0.,           1.,           0.,           0.,           0.,           1.
3, 45.
*Orientation, name=Ori-CompositeLayup-1-1-L2
          0.,           1.,           0.,           0.,           0.,           1.
3, 0.
*Orientation, name=Ori-CompositeLayup-1-1-L3
          0.,           1.,           0.,           0.,           0.,           1.
3, 0.
*Orientation, name=Ori-CompositeLayup-1-1-L4
          0.,           1.,           0.,           0.,           0.,           1.
3, -45.
*Orientation, name=Ori-CompositeLayup-1-1-L5
          0.,           1.,           0.,           0.,           0.,           1.
3, 0.
*Orientation, name=Ori-CompositeLayup-1-1-L6
          0.,           1.,           0.,           0.,           0.,           1.
3, 0.
*Orientation, name=Ori-CompositeLayup-1-1-L7
          0.,           1.,           0.,           0.,           0.,           1.
3, -45.
*Orientation, name=Ori-CompositeLayup-1-1-L8
          0.,           1.,           0.,           0.,           0.,           1.
3, 0.
*Orientation, name=Ori-CompositeLayup-1-1-L9
          0.,           1.,           0.,           0.,           0.,           1.
3, 0.
*Orientation, name=Ori-CompositeLayup-1-1-L10
          0.,           1.,           0.,           0.,           0.,           1.
3, 45.
*Shell Section, elset=CompositeLayup-1-1, composite, layup=CompositeLayup-1
0.15, 3, T700_danxiang, Ori-CompositeLayup-1-1-L1, Ply-1
0.15, 3, T700_danxiang, Ori-CompositeLayup-1-1-L2, Ply-2
0.15, 3, T700_danxiang, Ori-CompositeLayup-1-1-L3, Ply-3
0.15, 3, T700_danxiang, Ori-CompositeLayup-1-1-L4, Ply-4
0.15, 3, T700_danxiang, Ori-CompositeLayup-1-1-L5, Ply-5
0.15, 3, T700_danxiang, Ori-CompositeLayup-1-1-L6, Ply-6
0.15, 3, T700_danxiang, Ori-CompositeLayup-1-1-L7, Ply-7
0.15, 3, T700_danxiang, Ori-CompositeLayup-1-1-L8, Ply-8
0.15, 3, T700_danxiang, Ori-CompositeLayup-1-1-L9, Ply-9
0.15, 3, T700_danxiang, Ori-CompositeLayup-1-1-L10, Ply-10
*End Part
**
**
** ASSEMBLY
**
*Assembly, name=Assembly
**
*Instance, name=P168m-3blade-V3-hover-1, part=P168m-3blade-V3-hover
*End Instance
**
*Node
      1,           0.,   661.215881,           0.
*Nset, nset=all, instance=P168m-3blade-V3-hover-1, generate
    1,  3570,     1
*Elset, elset=all, instance=P168m-3blade-V3-hover-1, generate
    1,  3673,     1
*Nset, nset=hub, instance=P168m-3blade-V3-hover-1
 3571,
*Nset, nset=load_point
 1,
*Nset, nset=s_Set-1, instance=P168m-3blade-V3-hover-1
   3,   4,   9,  11,  43,  45
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*Elset, elset=s_Set-1, instance=P168m-3blade-V3-hover-1
   26,   27,   28,   29,   30,   69
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*Nset, nset=s_Set-3, instance=P168m-3blade-V3-hover-1
  25,  26,  27,  41,  50,  51
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*Elset, elset=s_Set-3, instance=P168m-3blade-V3-hover-1
 1096, 1097, 1098, 1099, 1100, 1101
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*Surface, type=NODE, name=s_Set-1_CNS_, internal
s_Set-1, 1.
*Surface, type=NODE, name=s_Set-3_CNS_, internal
s_Set-3, 1.
** Constraint: Constraint-1
*Coupling, constraint name=Constraint-1, ref node=hub, surface=s_Set-1_CNS_
*Kinematic
** Constraint: Constraint-2
*Coupling, constraint name=Constraint-2, ref node=load_point, surface=s_Set-3_CNS_
*Kinematic
*End Assembly
**
** MATERIALS
**
*Material, name=GFRP
*Density
 1.9e-09,
*Elastic, type=LAMINA
44000.,8700., 0.33,3050.,3050.,4000.
*Material, name=GFRP-solid
*Density
 1.9e-09,
*Elastic, type=ENGINEERING CONSTANTS
44000.,8700.,8700., 0.33, 0.33, 0.33,3050.,3050.
4000.,
*Material, name=Pb
*Density
 1.134e-08,
*Elastic
17000., 0.42
*Material, name=T300_tex
*Density
 1.8e-09,
*Elastic, type=LAMINA
63900.,62000.,  0.35, 5070., 5070., 4000.
*Material, name=T700_danxiang
*Density
 1.8e-09,
*Elastic, type=LAMINA
120000.,926000.,   0.25,  4240.,  4240.,  4000.
**
** BOUNDARY CONDITIONS
**
** Name: BC-1 Type: Symmetry/Antisymmetry/Encastre
*Boundary
hub, ENCASTRE
** ----------------------------------------------------------------
**
** STEP: Step-2
**
*Step, name=Step-2, nlgeom=YES
*Static
1., 1., 1e-05, 1.
**
** LOADS
**
** Name: Load-1   Type: Concentrated force
*Cload, op=NEW
load_point, 3, -2739.15
**
** OUTPUT REQUESTS
**
*Restart, write, frequency=0
**
** FIELD OUTPUT: F-Output-2
**
*Output, field
*Node Output
CF, RF, U
*Element Output, directions=YES
EE, LE, PEEQ, PEMAG, S
*Contact Output
CDISP, CSTRESS
*Output, history, frequency=0
*End Step
** ----------------------------------------------------------------
**
** STEP: Step-3
**
*Step, name=Step-3, nlgeom=YES
*Static
1., 1., 1e-05, 1.
**
** LOADS
**
** Name: Load-1   Type: Concentrated force
*Cload, op=NEW
** Name: Load-2   Type: Concentrated force
*Cload, op=NEW
load_point, 1, 400.
**
** OUTPUT REQUESTS
**
*Restart, write, frequency=0
**
** FIELD OUTPUT: F-Output-2
**
*Output, field
*Node Output
CF, RF, U
*Element Output, directions=YES
EE, LE, PEEQ, PEMAG, S
*Contact Output
CDISP, CSTRESS
*Output, history, frequency=0
*End Step
** ----------------------------------------------------------------
**
** STEP: Step-4
**
*Step, name=Step-4, nlgeom=YES
*Static
1., 1., 1e-05, 1.
**
** LOADS
**
** Name: Load-2   Type: Concentrated force
*Cload, op=NEW
** Name: Load-3   Type: Moment
*Cload, op=NEW
load_point, 4, 60000.
**
** OUTPUT REQUESTS
**
*Restart, write, frequency=0
**
** FIELD OUTPUT: F-Output-2
**
*Output, field
*Node Output
CF, RF, U
*Element Output, directions=YES
EE, LE, PEEQ, PEMAG, S
*Contact Output
CDISP, CSTRESS
*Output, history, frequency=0
*End Step
** ----------------------------------------------------------------
**
** STEP: Step-5
**
*Step, name=Step-5, nlgeom=YES
*Static
1., 1., 1e-05, 1.
**
** LOADS
**
** Name: Load-3   Type: Moment
*Cload, op=NEW
** Name: Load-4   Type: Rotational body force
*Dload
all, CENTRIF, 1e-06,0.,0.,0.,0.,0.,1.
**
** OUTPUT REQUESTS
**
*Restart, write, frequency=0
**
** FIELD OUTPUT: F-Output-2
**
*Output, field
*Node Output
CF, RF, U
*Element Output, directions=YES
EE, LE, PEEQ, PEMAG, S
*Contact Output
CDISP, CSTRESS
*Output, history, frequency=0
*End Step
** ----------------------------------------------------------------
**
** STEP: Step-6
**
*Step, name=Step-6, nlgeom=NO, perturbation
*Frequency, eigensolver=Lanczos, sim, acoustic coupling=on, normalization=mass
10, , , , ,
**
** OUTPUT REQUESTS
**
*Restart, write, frequency=0
**
** FIELD OUTPUT: F-Output-4
**
*Output, field, variable=PRESELECT
*End Step
** ----------------------------------------------------------------
**
** STEP: Step-7
**
*Step, name=Step-7, nlgeom=YES
*Static
1., 1., 1e-05, 1.
**
** LOADS
**
** Name: Load-4   Type: Rotational body force
*Dload
all, CENTRIF, 13456.,0.,0.,0.,0.,0.,1.
**
** OUTPUT REQUESTS
**
*Restart, write, frequency=0
**
** FIELD OUTPUT: F-Output-2
**
*Output, field
*Node Output
CF, RF, U
*Element Output, directions=YES
EE, LE, PEEQ, PEMAG, S
*Contact Output
CDISP, CSTRESS
*Output, history, frequency=0
*End Step
** ----------------------------------------------------------------
**
** STEP: Step-8
**
*Step, name=Step-8, nlgeom=NO, perturbation
*Frequency, eigensolver=Lanczos, sim, acoustic coupling=on, normalization=mass
10, , , , ,
**
** OUTPUT REQUESTS
**
*Restart, write, frequency=0
**
** FIELD OUTPUT: F-Output-4
**
*Output, field, variable=PRESELECT
*End Step
** ----------------------------------------------------------------
**
** STEP: Step-9
**
*Step, name=Step-9, nlgeom=YES
*Static
1., 1., 1e-05, 1.
**
** LOADS
**
** Name: Load-4   Type: Rotational body force
*Dload
all, CENTRIF, 53777.6,0.,0.,0.,0.,0.,1.
**
** OUTPUT REQUESTS
**
*Restart, write, frequency=0
**
** FIELD OUTPUT: F-Output-2
**
*Output, field
*Node Output
CF, RF, U
*Element Output, directions=YES
EE, LE, PEEQ, PEMAG, S
*Contact Output
CDISP, CSTRESS
*Output, history, frequency=0
*End Step
** ----------------------------------------------------------------
**
** STEP: Step-10
**
*Step, name=Step-10, nlgeom=NO, perturbation
*Frequency, eigensolver=Lanczos, sim, acoustic coupling=on, normalization=mass
10, , , , ,
**
** OUTPUT REQUESTS
**
*Restart, write, frequency=0
**
** FIELD OUTPUT: F-Output-4
**
*Output, field, variable=PRESELECT
*End Step
